set %dm.bpm 0.0037
set %dm.music $qt($scriptdirWHORE.wav)
set %dm.interlace 1
dmOpenBuffer @dm.interlace.1 320 180
dmTilePic    @dm.interlace.1 $scriptdirimg\raster-1.png
dmOpenBuffer @dm.interlace.2 320 180
dmTilePic    @dm.interlace.2 $scriptdirimg\raster-2.png
;;----------------------------------------------------------
dmLoadPart splash.mrc
set %dm.splash.drop.t 0
set %dm.splash.drop.o 1
;;---------------------------
set %dm.splash.text.1 Yes!
set %dm.splash.text.2 The mighty
set %dm.splash.text.3 poo-brain posse
set %dm.splash.text.4 has returned
set %dm.splash.text.5 with a new demo
set %dm.splash.text.6 at evoke 2014
set %dm.splash.text.7 called...
set %dm.splash.text.8 $str($chr(160), 8)
set %dm.splash.text.c 1
set %dm.splash.text.ctab $dmGenCtab($scriptdirimg\ctab\black-blue-black.png)
set %dm.splash.text.ctab.c 1
set %dm.splash.text.interlace.c 1
dmOpenBuffer @dm.splash.1 320 180
dmTilePic    @dm.splash.1 $scriptdirimg\raster-1.png
dmOpenBuffer @dm.splash.2 320 180
dmTilePic    @dm.splash.2 $scriptdirimg\raster-2.png
dmOpenBuffer @dm.splash.3 320 180
set %dm.splash.drop.rate 32
;;----------------------------------------------------------
dmLoadPart logozoom.mrc
dmOpenBuffer @dm.logozoom.1 960 960
dmOpenBuffer @dm.logozoom.2 320 320
drawpic -nc  @dm.logozoom.1 0 0 $qt($scriptdirimg\logo.png)
set %dm.logozoom.zoom -315
set %dm.logozoom.zoom.scale 0
set %dm.logozoom.fade.ctab $dmGenCtab($scriptdirimg\ctab\white-black.png)
set %dm.logozoom.fade.current $rgb(255, 255, 255)
set %dm.logozoom.fade.c 1
;;----------------------------------------------------------
dmLoadPart cubes.mrc
set %dm.cubes.size 16
set %dm.cubes.offset 42
set %dm.cubes.squaretab 86 43,0 43,129 43,129 0,0 129,86 129,43 129,129 86,86 86,0 86,129 129,43 0,43 43,43 86,86 0,0 0
set %dm.cubes.squaretab.c 1
set %dm.cubes.pic $qt($scriptdirimg\unicorn.png)
set %dm.cubes.picfade 0
set %dm.cubes.colour.1 $rand(0, 16777215)
set %dm.cubes.colour.2 $rand(0, 16777215)
set %dm.cubes.colour.3 $rand(0, 16777215)
set %dm.cubes.colour.4 $rand(0, 16777215)
set %dm.cubes.colour.c 1
set %dm.cubes.fadeout.1 0
;;----------------------------------------------------------
dmLoadPart starfield.mrc
dmOpenBuffer @dm.starfield.1 340 180
dmOpenBuffer @dm.starfield.2 340 180
dmOpenBuffer @dm.starfield.3 340 180
;;----------------------------------------------------------
set %dm.sinescroll.offset 1
set %dm.sinescroll.x 320
set %dm.sinescroll.text $upper(greetings to lnx - trsi - svatg - trbl - DSS - Guideline - MegaHawks Inc. - 3LN - trilobit - DDK - Nuance - plush - Farbrausch - hitmen - AttentionWhore - Fairlight - dekadence - Crest - Oxyron - RiFT - Titan (sucks) - RBBS - Spaceballs - and all the forgotten ones... .. .)
set %dm.sinescroll.ctab $dmGenCtab($scriptdirimg\ctab\rainbow.png)
;;----------------------------------------------------------
dmLoadPart copper.mrc
set %dm.copper.tabcnt 1
set %dm.copper.barcount 1
set %dm.copper.y.offset -70
set %dm.copper.logo $qt($scriptdirimg\poobrain.png)
dmOpenBuffer @dm.copper.1 320 180
set %dm.copper.flash 1
set %dm.copper.flash.c 0
set %dm.copper.fadeout 0
;;----------------------------------------------------------
dmLoadPart picwobble.mrc
window -dk0pfh @dm.picwobble.1 0 0 320 180
drawrect -nrf @dm.picwobble.1 0 0 0 0 320 180
set %dm.picwobble.c 0
set %dm.picwobble.picfade 0
set %dm.picwobble.pic $qt($scriptdirimg\poobrain.png)
set %dm.picwobble.offset 0
set %dm.picwobble.fadeout 0
;;----------------------------------------------------------
dmLoadPart vertscroll.mrc
set %dm.vertscroll.text reng deng deng deng je moet stampen jonguhhh en vooral genieten van de laatste paar momenten en effecten van deze onwaarschijnlijk kwalitatief hoge poo brain demo je weet zelf
set %dm.vertscroll.textLen $len(%dm.vertscroll.text)
set %dm.vertscroll.scrollY 180
set %dm.vertscroll.offset 1
set %dm.vertscroll.bg.offset -90
dmOpenBuffer @dm.vertscroll.1 320 180
set %dm.vertscroll.flash 1
set %dm.vertscroll.flash.c 0
;;----------------------------------------------------------
dmLoadPart rotozoom.mrc
set %dm.rotozoom.tex $qt($scriptdirimg\rotzoomtex2.png)
set %dm.rotozoom.c 90
set %dm.rotozoom.fadein 3000
dmOpenBuffer @dm.rotozoom.1 400 400
set %dm.rotozoom.ctab $dmGenCtab($scriptdirimg\ctab\rainbow.png)
dmOpenBuffer @dm.rotozoom.2 320 180
set %dm.rotozoom.pic.fade 0
;;----------------------------------------------------------
dmLoadPart moire.mrc
set %dm.moire.c 0
set %dm.moire.tot 1
set %dm.moire.k1 $rgb(255,255,0)
set %dm.moire.k2 $rand(0, 16777215)
set %dm.moire.k.c 1
set %dm.moire.pic.h 0
set %dm.moire.fadeout 320
;;----------------------------------------------------------
dmLoadPart stretch.mrc
dmOpenBuffer @dm.stretch.tex 1280 720
drawpic @dm.stretch.tex 0 0 $qt($scriptdirimg\pattern.png)
set %dm.stretch.zoom 8000
set %dm.stretch.pan 400
set %dm.stretch.fade.tab 149 107 64 158 134 110 116 156 53 170 11 160 129 180 177 36 54 17 178 6 143 84 132 25
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set %dm.stretch.fade.c 0
dmOpenBuffer @dm.stretch.1 320 180
drawrect -nrf @dm.stretch.1 $rgb(255,255,255) 0 0 0 320 180
;;----------------------------------------------------------
dmLoadPart vector.mrc
set %dm.vector.v -0.541 0.500 0.657 -0.541 0.557 0.657 -0.398 0.500 0.657 -0.398 0.557 0.657 -0.541 0.557 0.514 -0.541 0.500 0.514 -0.398 0.557 0.514 -0.398 0.500 0.514
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;;----------------------------------------------------------
